<?xml version="1.0"?>
<Node>
	<RequiredPlugin name="SofaImplicitField" />
        <CustomField name="field" function="customfield_cython.evalField"/>
        <PointCloudImplicitFieldVisualization field="@field" box="-1 -1 -1 1 1 1"/>
</Node>
